k := 3*(3 - 4) + 9 = 6
t := 9
a := 0.11*t = 0.99
b := 0.02*k = 0.12
g := b
d := 0.015*t = 0.135
X := [0; 0; 0; 0]
ORIGIN := 1
matrix := [
    6.26 + a, 1.10 - b, 0.97 + g, 1.24 - d;
    1.10 - b, 4.16 - a, 1.30, 0.16;
    0.97 + g, 1.30, 5.44 + a, 2.10;
    1.24 - d, 0.16, 2.10, 6.1 - a
] = [7.25, 0.98, 1.09, 1.105; 0.98, 3.17, 1.3, 0.16; 1.09, 1.3, 6.43, 2.1; 1.105, 0.16, 2.1, 5.11]
N := 4
solve block
    # constraints
    matrixDiagonal*X == rightPartDiagonal
    # solver
    X := find(X)
    X
end solve block
r := rightPartDiagonal - (matrixDiagonal*X)
xm := X
x := [0.901766; 1.071608; -0.394924; -0.18133]
r =  # error: This variable is undefined. Check that the label is set correctly.
δ := sqrt(1/N*sum((x[k] - xm[k])^2, k = 1 .. N))
δ =  # error
δ =  # error
