# Worksheet setting: ORIGIN = 1
# Початкові значення
variant := 9
function(x) := cos(x)/(x + 1)
a := 0.1
b := 1.1
# [plot: function(x) vs x]
# Обчислюю похибки
integralValueMathcad := integral(function(x), x = a .. b) = 0.530173
