# Worksheet setting: ORIGIN = 1
# Початкові значення
variant := 9
n := variant - 5 = 4
a := 1 + 0.4*n
k := variant - 5 = 4
b := 1 + 0.4*k
y' := e^(-ax)*(y^2 + b)  # error: This variable is undefined. Check that the label is set correctly.
